# Jason T. Ivey 800696866 2/11/2019 Mathcad Intro
A := 5
B := 4
A = 5
B = 4
C := A + B
C = 9
C := A - B
C = 1
C := A/B
C = 1.25
C := A*B
C = 20
C := A^B
C = 625
C := sqrt(A)
C = 2.23607
D := 4 + j*5  # error: This variable is undefined.
